f(x1, x2) := 2*x1*x2 - x1^2 - 2*x2^2
L(x1, x2, λ) := f(x1, x2) + λ*(6 - 2*x1 - 3*x2)
dLx1(x1, x2, λ) := d/dx1(L(x1, x2, λ))
dLx1(x1, x2, λ) → 2*x2 - 2*x1 - 2*λ
dLx2(x1, x2, λ) := d/dx2(L(x1, x2, λ))
dLx2(x1, x2, λ) → 2*x1 - 3*λ - 4*x2
dLλ(x1, x2, λ) := d/dλ(L(x1, x2, λ))
dLλ(x1, x2, λ) → 6 - 3*x2 - 2*x1
x1 := 0
x2 := 0
λ := 0
Given
dLx1(x1, x2, λ) == 0
dLx2(x1, x2, λ) == 0
dLλ(x1, x2, λ) == 0
R := Find(x1, x2, λ)
R = [1.44828; 1.03448; -0.413793]
d11(x1, x2) := d^2/dx1^2(f(x1, x2))
d11(x1, x2) → -2
d12(x1, x2) := d/dx2(d/dx1(f(x1, x2)))
d12(x1, x2) → 2
d21(x1, x2) := d/dx1(d/dx2(f(x1, x2)))
d21(x1, x2) → 2
d22(x1, x2) := d^2/dx2^2(f(x1, x2))
d22(x1, x2) → -4
a11 := d11(1.448, 1.034) = -2
a21 := d21(1.448, 1.034) = 2
a12 := d12(1.448, 1.034) = 2
a22 := d22(1.448, 1.034) = -4
Δ1 := a11
Δ2 := det([a11, a12; a21, a22])
Δ1 = -2
Δ2 = 4  # _ Так как числа черередуются знаки - максимум
f(1.448, 1.034) = -1.24055
