x_1 := 1
x_2 := 1
f(x_1, x_2) := 2*x_1 + x_2
Given
x_1 - x_2 ≤ 10
5*x_1 - x_2 ≥ 10
x_1 + 3*x_2 ≤ 5
5*x_1 - x_2 ≤ 5
x_1 ≥ 0
x_2 ≥ 0
x := Maximize(f, x_1, x_2)  # error: Could not find a maximum or minimum.
